OpenVSP model (file version 5), 1 components.
Geometry view with OpenVSP parameter names; values to 6 digits, angles in degrees, lengths in the model's unit.
Overall bounding box: X_Min=-2.97955e-07 X_Len=0.562179 Y_Min=-0.698108 Y_Len=1.39622 Z_Min=-0.0219919 Z_Len=0.0823291

Wing "WingGeom"
  location (X Y Z) 0 0 0, rotation 0 0 0
  symmetric about XZ
  bounding box size 0.562179 1.39622 0.0823291
  negative volume
  totals: TotalSpan=1.4 TotalProjectedSpan=1.396 TotalChord=0.252857 TotalArea=0.318755 TotalAR=6.11388
  root: chord 0.6, twist 0, airfoil file "LA2573A"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 BaseThickChord=0.137494 ThickChord=0.137494
  sections:
    n  Span    Root_Chord  Tip_Chord  Area        Sweep     Sweep_Location  Dihedral  Twist  Twist_Location  tip airfoil
    1  0.09    0.6         0.55       0.05175     0         0               0         0      0.25            airfoil file "LA2573A"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 BaseThickChord=0.137494 DeltaX=0.0727 ThickChord=0.137494
    2  0.085   0.55        0.38       0.039525    0         0               0         0      0.25            airfoil file "MH 60  10.08%"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 BaseThickChord=0.101018 DeltaX=0.294737 ThickChord=0.101018
    3  0.05    0.38        0.16       0.0135      0         0               5         0      0.25            airfoil file "MH 60  10.08%"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 BaseThickChord=0.101018 DeltaX=0.875 ThickChord=0.101018
    4  0.1185  0.16        0.1375     0.0176269   -1.35882  0               5         0      1               airfoil file "MH 60  10.08%"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 BaseThickChord=0.101018 DeltaX=1.62 Theta=-3.37688 ThickChord=0.101018
    5  0.1185  0.1375      0.115      0.0149606   -1.35882  0               5         0      1               airfoil file "MH 60  10.08%"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 BaseThickChord=0.101018 DeltaX=2.65217 Theta=-0.370011 ThickChord=0.101018
    6  0.119   0.115       0.0925     0.0123462   -1.35882  0               5         0      1               airfoil file "MH 60  10.08%"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 BaseThickChord=0.101018 DeltaX=4.185 Theta=1.27509 ThickChord=0.101018
    7  0.119   0.0925      0.07       0.00966875  -1.35882  0               5         0      1               airfoil file "MH 60  10.08%"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 BaseThickChord=0.101018 DeltaX=6.71429 Theta=4.80457 ThickChord=0.101018

VSPAERO settings: Sref=0.318755 bref=1.4 cref=0.308 Xcg=0.215 Ycg=0 Zcg=0 AlphaStart=0 AlphaEnd=10 AlphaNpts=11 BetaStart=0 BetaEnd=0 BetaNpts=1 MachStart=0.1 MachEnd=0 MachNpts=1 ReCref=700000 Vinf=100 Rho=0.002377
